*Heading
 lin_kin_2cycle
** Job name: lin_kin_2cycle Model name: phase2_lin_kin
** Generated by: Abaqus/CAE 2024
*Preprint, echo=NO, model=NO, history=NO, contact=NO
**
** PARTS
**
*Part, name=Bar
*Node
      1,          10.,           2.,           2.
      2,          10.,          1.5,           2.
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*Element, type=C3D8R
  1,  26,  27,  32,  31,   1,   2,   7,   6
  2,  27,  28,  33,  32,   2,   3,   8,   7
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*Nset, nset=Sec_EP, generate
   1,  525,    1
*Elset, elset=Sec_EP, generate
   1,  320,    1
** Section: Sec_EP
*Solid Section, elset=Sec_EP, material=Steel_EP
,
*End Part
**
**
** ASSEMBLY
**
*Assembly, name=Assembly
**
*Instance, name=Bar-1, part=Bar
*End Instance
**
*Nset, nset=Set-5, instance=Bar-1, generate
   1,  525,    1
*Elset, elset=Set-5, instance=Bar-1, generate
   1,  320,    1
*Nset, nset=Set_Left_Face, instance=Bar-1, generate
 501,  525,    1
*Elset, elset=Set_Left_Face, instance=Bar-1, generate
 305,  320,    1
*Nset, nset=Set_Left_Nodes, instance=Bar-1, generate
 501,  525,    1
*Nset, nset=Set_Right_Nodes, instance=Bar-1, generate
  1,  25,   1
*Nset, nset=Set_Right_face, instance=Bar-1, generate
  1,  25,   1
*Elset, elset=Set_Right_face, instance=Bar-1, generate
  1,  16,   1
*End Assembly
*Amplitude, name=Amp_1cycle
             0.,              0.,            0.25,              1.,             0.5,             0.4,            0.75,            -0.2
             1.,             0.4,            1.25,              1.,             1.5,             0.4,            1.75,            -0.2
             2.,             0.4,            2.25,              1.,             2.5,             0.4,            2.75,            -0.2
             3.,             0.4,            3.25,              1.,             3.5,             0.4,            3.75,            -0.2
             4.,             0.4,            4.25,              1.,             4.5,             0.4,            4.75,            -0.2
             5.,             0.4,            5.25,              1.,             5.5,             0.4,            5.75,            -0.2
             6.,             0.4,            6.25,              1.,             6.5,             0.4,            6.75,            -0.2
             7.,             0.4,            7.25,              1.,             7.5,             0.4,            7.75,            -0.2
             8.,             0.4,            8.25,              1.,             8.5,             0.4,            8.75,            -0.2
             9.,             0.4,            9.25,              1.,             9.5,             0.4,            9.75,            -0.2
            10.,             0.4
**
** MATERIALS
**
*Material, name=Steel_EP
*Elastic
210000., 0.3
*Plastic, hardening=COMBINED, data type=PARAMETERS, number backstresses=1
250., 3000., 20.
** ----------------------------------------------------------------
**
** STEP: Step-1
**
*Step, name=Step-1, nlgeom=NO, inc=1000
*Static
0.01, 10., 1e-05, 0.02
**
** BOUNDARY CONDITIONS
**
** Name: BC-Left Type: Displacement/Rotation
*Boundary
Set_Left_Face, 1, 1
Set_Left_Face, 2, 2
Set_Left_Face, 3, 3
** Name: BC-Right Type: Displacement/Rotation
*Boundary, amplitude=Amp_1cycle
Set_Right_face, 1, 1, 0.5
**
** OUTPUT REQUESTS
**
*Restart, write, frequency=0
**
** FIELD OUTPUT: F-Output-1
**
*Output, field, variable=PRESELECT
**
** HISTORY OUTPUT: H-RF-Left
**
*Output, history
*Node Output, nset=Set_Left_Nodes
RF1, RF2, RF3, RM1, RM2, RM3
**
** HISTORY OUTPUT: H-U-right
**
*Node Output, nset=Set_Right_Nodes
U1, U2, U3, UR1, UR2, UR3
**
** HISTORY OUTPUT: H-Output-1
**
*Output, history, variable=PRESELECT
*End Step
