*Heading
 vp_10cycles7
** Job name: vp_10cycles7 Model name: Model-VP
** Generated by: Abaqus/CAE 2024
*Preprint, echo=NO, model=NO, history=NO, contact=NO
**
** PARTS
**
*Part, name=Part-1
*Node
      1,          10.,           2.,           2.
      2,          10.,          1.5,           2.
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*Element, type=C3D8R
  1,  26,  27,  32,  31,   1,   2,   7,   6
  2,  27,  28,  33,  32,   2,   3,   8,   7
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*Nset, nset=Set-1, generate
   1,  525,    1
*Elset, elset=Set-1, generate
   1,  320,    1
** Section: Section-1
*Solid Section, elset=Set-1, material=Material-VP
,
*End Part
**
**
** ASSEMBLY
**
*Assembly, name=Assembly
**
*Instance, name=Part-1-1, part=Part-1
*End Instance
**
*Nset, nset=Set-1, instance=Part-1-1, generate
 501,  525,    1
*Elset, elset=Set-1, instance=Part-1-1, generate
 305,  320,    1
*Nset, nset=Set-2, instance=Part-1-1, generate
  1,  25,   1
*Elset, elset=Set-2, instance=Part-1-1, generate
  1,  16,   1
*End Assembly
*Amplitude, name=Amp-1, definition=PERIODIC
4,     6.283185307,              0.,              0.
             0.,              0.,            0.25,              1.,             0.5,              0.,              1.,             -1.
**
** MATERIALS
**
*Material, name=Material-1
*Elastic
70000., 0.33
*Material, name=Material-VP
*Elastic
70000., 0.33
*Plastic, rate=0.
150.,0.
300., 0.02
*Plastic, rate=0.001
260.,0.
312., 0.02
*Plastic, rate=1.
300.,0.
360., 0.02
** ----------------------------------------------------------------
**
** STEP: Step-1
**
*Step, name=Step-1, nlgeom=NO
Static, General
*Static
10., 10., 0.0001, 10.
**
** BOUNDARY CONDITIONS
**
** Name: BC-left Type: Displacement/Rotation
*Boundary
Set-1, 1, 1
Set-1, 2, 2
Set-1, 3, 3
** Name: BC-right Type: Displacement/Rotation
*Boundary, amplitude=Amp-1
Set-2, 1, 1, 0.1142857143
**
** OUTPUT REQUESTS
**
*Restart, write, frequency=0
**
** FIELD OUTPUT: F-Output-1
**
*Output, field, frequency=1000
*Node Output
CF, RF, U
*Element Output, directions=YES
E, EE, EEQUT, ER, GKEEQ, GKPEEQ, IE, LE, NBEEQ, NBPEEQ, NE, PE, PEEQ, PEEQMAX, PEEQT, PEMAG
PEQC, S, SALPHA, SE, SEE, SEP, SEPE, SPE, TE, TEEQ, TEVOL, THE, VE, VEEQ
*Contact Output
CDISP, CSTRESS
**
** HISTORY OUTPUT: H-Output-1
**
*Output, history, variable=PRESELECT
*End Step
