*Heading
** Job name: mono_ep_test Model name: Model-1
** Generated by: Abaqus/CAE 2024
*Preprint, echo=NO, model=NO, history=NO, contact=NO
**
** PARTS
**
*Part, name=Part-1
*Node
      1,          10.,           2.,           2.
      2,          10.,          1.5,           2.
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*Element, type=C3D8R
  1,  26,  27,  32,  31,   1,   2,   7,   6
  2,  27,  28,  33,  32,   2,   3,   8,   7
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*Nset, nset=Set-1, generate
   1,  525,    1
*Elset, elset=Set-1, generate
   1,  320,    1
*Nset, nset=Sec_EP, generate
   1,  525,    1
*Elset, elset=Sec_EP, generate
   1,  320,    1
** Section: Sec_EP
*Solid Section, elset=Sec_EP, material=Steel_EP
,
*End Part
**
**
** ASSEMBLY
**
*Assembly, name=Assembly
**
*Instance, name=Part-1-1, part=Part-1
*End Instance
**
*Nset, nset=Set-1, instance=Part-1-1, generate
 501,  525,    1
*Elset, elset=Set-1, instance=Part-1-1, generate
 305,  320,    1
*Nset, nset=Set-2, instance=Part-1-1, generate
  1,  25,   1
*Elset, elset=Set-2, instance=Part-1-1, generate
  1,  16,   1
*Nset, nset=Set_Left_Nodes, instance=Part-1-1, generate
 501,  525,    1
*Nset, nset=Set_Right_Nodes, instance=Part-1-1, generate
   1,  25,   1
*End Assembly
*Amplitude, name=Amp-1, definition=PERIODIC
4,     6.283185307,              0.,              0.
             0.,              0.,            0.25,              1.,             0.5,              0.,              1.,             -1.
**
** MATERIALS
**
*Material, name=Material-1
*Elastic
70000., 0.33
** Elastic: E = 210000, nu = 0.30
*Material, name=Steel_EP
*Elastic
210000., 0.3
*Plastic
250.,   0.
300., 0.02
350.,  0.1
** ----------------------------------------------------------------
**
** STEP: Step-1
**
*Step, name=Step-1, nlgeom=NO
Static, General
*Static
1., 1., 1e-05, 1.
**
** BOUNDARY CONDITIONS
**
** Name: BC-left Type: Displacement/Rotation
*Boundary
Set-1, 1, 1
Set-1, 2, 2
Set-1, 3, 3
** Name: BC-right Type: Displacement/Rotation
*Boundary
Set-2, 1, 1, 0.5
**
** OUTPUT REQUESTS
**
*Restart, write, frequency=0
**
** FIELD OUTPUT: F-Output-1
**
*Output, field, variable=PRESELECT
**
** HISTORY OUTPUT: H-RF-left
**
*Output, history
*Node Output, nset=Set_Left_Nodes
CF1, CF2, CF3, CM1, CM2, CM3, CW, RF1
RF2, RF3, RFMAG, RM, RM1, RM2, RM3, RT
RWM, TF1, TF2, TF3, TM1, TM2, TM3, VF1
VF2, VF3, VM1, VM2, VM3
**
** HISTORY OUTPUT: H-U-right
**
*Node Output, nset=Set_Right_Nodes
U1, U2, U3, UMAG, UR, UR1, UR2, UR3
UT, V1, V2, V3, VR, VR1, VR2, VR3
VT, WARP
**
** HISTORY OUTPUT: H-Output-1
**
*Output, history, variable=PRESELECT
*End Step
